// COMSOL Multiphysics 5.6.0.280 model "Filter Design Project.mph"
// Outline of the model tree

Parameters
  Lf = 20.095 [mm]
  Wf = 5.3268 [mm]
  Lc = 6.0314 [mm]
  Wc = 29.2317 [mm]
  Li = 9.8083 [mm]
  Wi = 3.5925 [mm]
  Ls = Lf+Lc+Li+Lc+Lf
  Ws = 2*Wc
  ds = 1.52 [mm]

Geometry
  geom1 "Microstrip Filter" (3D, length unit m)
    blk1: Block "Substrate" | pos = {-0.029, -0.03105, -0.001}; size = {Ws, Ls, ds}
    wp1: WorkPlane "SubstrateTop" | quickz = ds/2; unite = on; workplane3d = off
      r1: Rectangle "FeedLine" | pos = {-Wf/2, -Ls/2}; size = {Wf, Lf}
      r2: Rectangle "C1" | pos = {-Wc/2, Lc/2 +0.0018}; size = {Wc, Lc}
      r3: Rectangle "L" | pos = {-Wi/2, -Li/2}; size = {Wi, Li}
      r4: Rectangle "C2" | pos = {-Wc/2, -Lc/2-0.0080}; size = {Wc, Lc}
      r5: Rectangle "FeedLine2" | pos = {-Wf/2, -Ls/2+Lf+Lc+Li+Lc}; size = {Wf, Lf}
    wp2: WorkPlane | quickplane = zx; quicky = -Ls/2; unite = on
      r1: Rectangle "input port" | pos = {-ds/2, -Wf/2}; size = {ds, Wf}
    wp3: WorkPlane | quickplane = zx; quicky = Ls/2; unite = on
      r1: Rectangle "output port" | pos = {-ds/2, -Wf/2}; size = {ds, Wf}
    fin: Finalize "Form Union"

Materials
  mat1: Common "Material 1" on all domains
    def "Basic"
      electricconductivity = 0
      relpermeability = 1
      relpermittivity = 3

Physics
  emw: ElectromagneticWaves "Electromagnetic Waves, Frequency Domain" on all domains
    dependent variable E = {Ex, Ey, Ez}
    wee1: WaveEquationElectric (default)
    pec1: PerfectElectricConductor (default)
    init1: init "Initial Values 1" (default)
    lport1: LumpedPort "Lumped Port 1 - Input" (disabled) on boundaries 8
    lport2: LumpedPort "Lumped Port 2 - Output" (disabled) on boundaries 13
    pmc1: PerfectMagneticConductor on boundaries 1, 4, 16
    pec2: PerfectElectricConductor on boundaries 3, 6, 7, 10-12, 14, 15

Mesh
  mesh1 "Mesh 1"
    size: MeshSizeDefault | hmax = 0.00621; hmin = 0.00112; hcurve = 0.6; hnarrow = 0.5; hgrad = 1.5
    ftri1: FreeTri "Free Triangular 1" on boundaries 8, 13
      size1: Size on boundaries 8, 13 | custom = on; hmax = 1
    ftet1: FreeTet "Free Tetrahedral 1" on remaining entities
      size1: Size on entire geometry | hauto = 6; custom = on; hmin = 0.1

Studies
  std1 "Study 1"
    freq: Frequency "Frequency Domain" | punit = Hz; plist = range(1000000,50000000,6.0e9)
  std2 "Study 2"
    freq: Frequency "Frequency Domain" | punit = GHz; plist = 1[GHz]
  std3 "Study 3"

Solver configurations
  sol1 "Solution 1" (study std1)
    v1: Variables "Dependent Variables 1"
    s1: Stationary "Stationary Solver 1" | stol = 0.01
      p1: Parametric | pname = freq; plistarr = range(1000000,50000000,6.0e9); punit = Hz; pcontinuationmode = no
      fc1: FullyCoupled | linsolver = i1
      i1: Iterative "Suggested Iterative Solver (emw)" | itrestart = 300; prefuntype = right
        mg1: Multigrid | iter = 1

Datasets
  dset1: Solution | solution = sol1
  cln1: CutLine3D | data = dset1; genpoints = {{0, -Ls, ds/2}, {0, Ls, ds/2}}; bounded = off; bndsnap = on

Plots
  pg1: PlotGroup3D "Electric Field (emw)" | data = dset1
    mslc1: Multislice | expr = emw.normE
  pg2: PlotGroup1D "S-Parameter (emw)" | data = dset1; ylabel = S-parameter (dB)
  pg3: PlotGroup1D "1D Plot Group 3" | data = dset1
    lngr1: LineGraph | data = cln1; expr = emw.normE